# OpenSim document version 40000
AnalyzeTool Moco:
  model_file: ..\..\OpenSim\In\Models\RTSA_Adjusted\FSModel_GHJoint_W67mxx521wd.osim
  replace_force_set: false
  results_directory: ..\..\OpenSim\Out\Moco\sim_W67mxx521wd\
  output_precision: 8
  initial_time: 0
  final_time: 1.06645
  solve_for_equilibrium_for_auxiliary_states: false
  maximum_number_of_integrator_steps: 20000
  maximum_integrator_step_size: 1
  minimum_integrator_step_size: 1e-8
  integrator_error_tolerance: 1e-5
  states_file: ..\..\OpenSim\Out\Moco\sim_W67mxx521wd\MocoSol_LateralReach.sto
  lowpass_cutoff_frequency_for_coordinates: -1
  AnalysisSet Analyses:
    JointReaction: start_time=0 end_time=1.06645 step_interval=1 in_degrees=true joint_names=shoulder0
        apply_on_bodies=parent express_in_frame=/bodyset/scapula/glenoid_centre/
    ForceReporter: start_time=0 end_time=1.06645 step_interval=1 in_degrees=true include_constraint_forces=false
